*Heading
** Job name: From-2D-to-2D-Example5 Model name: From-2D-to-2D-Example5
** Generated by: Abaqus/CAE 2020
*Preprint, echo=NO, model=NO, history=NO, contact=NO
**
** PARTS
**
*Part, name=Plate
*Node
      1,          0.5,          0.5,           0.
      2,           1.,          0.5,           0.
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*Element, type=C3D20H
  1,  114,  475,  836,  113,    1,   19,   56,    4, 3366, 3365, 3364, 3363, 3367, 3368, 3369,
     3370, 3372, 3371, 3373, 3374
  2,  475,  476,  837,  836,   19,   20,   55,   56, 3377, 3376, 3375, 3365, 3378, 3379, 3380,
     3368, 3371, 3381, 3382, 3373
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*Nset, nset=MidBot
 1,
*Nset, nset=MidTop
 4,
*Nset, nset=RightBot
 2,
*Nset, nset=WholePlate, generate
     1,  11603,      1
*Elset, elset=WholePlate, generate
    1,  1600,     1
** Section: Home
*Solid Section, elset=WholePlate, material=NeoHookean
,
*End Part
**
**
** ASSEMBLY
**
*Assembly, name=Assembly
**
*Instance, name=Plate-1, part=Plate
*End Instance
**
*Nset, nset=Ori, instance=Plate-1
 18,
*Nset, nset=RightFace, instance=Plate-1
    2,    3,    5,    6,   10,   11
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*Elset, elset=RightFace, instance=Plate-1, generate
  20,  800,   20
*Nset, nset=SurY0, instance=Plate-1
    9,   10,   11,   12,   17,   18
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*Elset, elset=SurY0, instance=Plate-1
  781,  782,  783,  784,  785,  786
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*End Assembly
**
** MATERIALS
**
*Material, name=NeoHookean
*Depvar
      9,
*User Material, constants=2
906512., 0.4995
** ----------------------------------------------------------------
**
** STEP: Growth-10
**
*Step, name=Growth-10, nlgeom=YES, inc=3000
*Static
0.1, 10., 1e-06, 0.1
**
** BOUNDARY CONDITIONS
**
** Name: All=Z Type: Displacement/Rotation
*Boundary
Plate-1.WholePlate, 3, 3
** Name: Right Type: Displacement/Rotation
*Boundary
RightFace, 1, 1
**
** OUTPUT REQUESTS
**
*Restart, write, frequency=0
**
** FIELD OUTPUT: F-Output-1
**
*Output, field
*Node Output
CF, RF, U
*Element Output, directions=YES
LE, PE, PEEQ, PEMAG, S, SDV
*Contact Output
CDISP, CSTRESS
**
** HISTORY OUTPUT: H-Output-1
**
*Output, history, variable=PRESELECT
*End Step
